// COMSOL Multiphysics 6.0.0.318 model "Crack_2D.mph"
// Outline of the model tree

Functions
  ux1: Interpolation | source = file; filename = /Users/mohammad/Downloads/Multi-Cracks/23_6_28_23_branches/COMSOL_IO/ux1.txt; nargs = 2; fununit = m; argunit = {m, m}
  uy1: Interpolation "Interpolation 1a" | source = file; filename = /Users/mohammad/Downloads/Multi-Cracks/23_6_28_23_branches/COMSOL_IO/uy1.txt; nargs = 2; fununit = m; argunit = {m, m}
  sxx1: Interpolation "Interpolation 1b" | source = file; filename = /Users/mohammad/Downloads/Multi-Cracks/23_6_28_23_branches/COMSOL_IO/sxx1.txt; nargs = 2; fununit = Pa; argunit = {m, m}
  sxy1: Interpolation "Interpolation 1c" | source = file; filename = /Users/mohammad/Downloads/Multi-Cracks/23_6_28_23_branches/COMSOL_IO/sxy1.txt; nargs = 2; fununit = Pa; argunit = {m, m}
  syy1: Interpolation "Interpolation 1d" | source = file; filename = /Users/mohammad/Downloads/Multi-Cracks/23_6_28_23_branches/COMSOL_IO/syy1.txt; nargs = 2; fununit = Pa; argunit = {m, m}

Geometry
  geom1 "Geometry 1" (2D, length unit m)
    r1: Rectangle | base = center; size = {0.2, 0.2}
    pt1: Point | p = {0, -0.1}
    fin: Finalize "Form Union"

Physics
  solid: SolidMechanics on all domains
    dependent variable u = {u, v, w}
    lemm1: LinearElasticModel "Linear Elastic Material 1" (default)
      E_mat = userdef
      E = 231520000000[Pa]
      nu_mat = userdef
      nu = 0.33333
      rho_mat = userdef
      rho = 3950
    free1: Free (default)
    init1: init "Initial Values 1" (default)
    bndl1: BoundaryLoad on boundaries 1 | FperArea = {sxx1(-0.1,y[1/m]), sxy1(-0.1,y[1/m]), 0}
    bndl2: BoundaryLoad on boundaries 2 | FperArea = {sxy1(x[1/m],-0.1)-0, syy1(x[1/m],-0.1)-86820000, 0}
    bndl3: BoundaryLoad on boundaries 3 | FperArea = {-sxy1(x[1/m],0.1)+0, -syy1(x[1/m],0.1)+86820000, 0}
    bndl4: BoundaryLoad on boundaries 4 | FperArea = {sxy1(x[1/m],-0.1)-0, syy1(x[1/m],-0.1)-86820000, 0}
    bndl5: BoundaryLoad on boundaries 5 | FperArea = {-sxx1(0.1,y[1/m]), -sxy1(0.1,y[1/m]), 0}
    disp1: Displacement0 "Prescribed Displacement 1" on points 1, 4 | Direction = {0, 1, 0}
    disp2: Displacement0 "Prescribed Displacement 2" on points 3 | Direction = {1, 0, 0}

Mesh
  mesh1 "Mesh 1"
    size: MeshSizeDefault | hauto = 1
    ftri1: FreeTri "Free Triangular 1" on remaining entities

Studies
  std1 "Study 1"
    stat: Stationary

Solver configurations
  sol1 "Solution 1" (study std1)
    v1: Variables "Dependent Variables 1"
    s1: Stationary "Stationary Solver 1"
      dDef: Direct
      fc1: FullyCoupled

Datasets
  dset1: Solution | solution = sol1
  cln1: CutLine2D | data = dset1; genpoints = {{-0.1, -0.1}, {-0.1, 0.1}}
  cln2: CutLine2D | data = dset1; genpoints = {{-0.1, 0.1}, {-0.1, -0.1}}
  cln3: CutLine2D | data = dset1; genpoints = {{-0.1, 0.1}, {0.1, 0.1}}
  cln4: CutLine2D | data = dset1; genpoints = {{0.1, 0.1}, {-0.1, 0.1}}

Plots
  pg1: PlotGroup2D "Elastic Fields1" | data = dset1
    surf1: Surface | expr = solid.sy+syy1(x,y); unit = MPa; descr = stress tensor, y component
      def: Deform "Deformation" | expr = {u, v}
  pg2: PlotGroup2D "2D Plot Group 2" | data = dset1
    SXX: Contour | expr = sxx1(x,y); unit = MPa
  pg3: PlotGroup2D "2D Plot Group 3" | data = dset1
    SXY: Contour | expr = sxy1(x,y); unit = MPa
  pg4: PlotGroup2D "2D Plot Group 4" | data = dset1
    SYY: Contour | expr = syy1(x,y); unit = MPa
  pg5: PlotGroup2D "2D Plot Group 5" | data = dset1
    s_total: Contour "Elastic Fields" | expr = syy1(x,y); unit = MPa; descr = stress tensor, y component
  pg6: PlotGroup2D "2D Plot Group 6" | data = dset1
    disp_total: Contour "Displacement Fields" | expr = v+uy1(x,y); unit = m; descr = displacement, y component